// COMSOL Multiphysics 5.3.0.260 model "sphere.mph"
// Outline of the model tree

Parameters
  dens = 2700[kg/m^3]
  k = 205.9[W/(m*K)]
  cp = 900 [J/(kg*K)]
  T0 = 272.15[K]
  T1 = 252.15[K]
  radius = 0.1[m]

Geometry
  geom1 "Geometry 1" (2D axisymmetric, length unit m)
    c1: Circle | r = radius
    fin: Finalize "Form Union"

Materials
  mat1: Common "Material 1" on domains 1
    def "Basic"
      thermalconductivity = k
      density = dens
      heatcapacity = cp

Physics
  ht: HeatTransfer "Heat Transfer in Solids" on all domains
    dependent variable T
    solid1: SolidHeatTransferModel "Solid 1" (default)
    init1: init "Initial Values 1" (default) | Tinit = T0
    axi1: AxialSymmetry (default)
    ins1: ThermalInsulation (default)
    temp2: TemperatureBoundary "outer_temp" on boundaries 2, 3 | T0_src = userdef; T0 = T1

Mesh
  mesh1 "Mesh 1" (physics-controlled)
    size: MeshSizeDefault | hauto = 2

Studies
  std1 "Study 1"
    time: Transient "Time Dependent" | tlist = range(0,1,100)

Solver configurations
  sol1 "Solution 1" (study std1)
    v1: Variables "Dependent Variables 1"
    t1: Time "Time-Dependent Solver 1" | tlist = range(0,1,100); maxorder = 2; estrat = exclude
      fc1: FullyCoupled | linsolver = d1; maxiter = 5; damp = 0.9; jtech = once
      d1: Direct | linsolver = pardiso

Datasets
  dset1: Solution | solution = sol1
  rev1: Revolve2D "Revolution 2D" | data = dset1; startangle = -90; revangle = 225
  cln1: CutLine2D | data = dset1

Plots
  pg1: PlotGroup3D "Temperature, 3D (ht)" | data = rev1
    surf1: Surface | expr = T
  pg2: PlotGroup2D "Isothermal Contours (ht)" | data = dset1
    con1: Contour | expr = T
  pg3: PlotGroup1D "1D Plot Group 3" | data = dset1
    lngr1: LineGraph | data = cln1; expr = T

Exports
  data1: Data
    data = cln1
    expr = T
    filename = C:\Users\Chee-Lok\iCloudDrive\Documents\UU\EXPH\P1-2_TP(SK-MTRPH)\Exercises\ex3\v.txt