// COMSOL Multiphysics 5.6.0.401 model "Ex4(1).mph"
// Outline of the model tree

Parameters
  thickness = (0.01/2) [m]  // Half plate thickness 0.005m
  kA = 2 [1/s]
  kB = 0.5 [1/s]
  cAL = 0.1 [mol/m^3]
  cBL = 0 [mol/m^3]
  diffusionConst = 1.18e-6 [m^2/s]

Geometry
  geom1 "Geometry 1" (1D, length unit m)
    i1: Interval | coord = {0, thickness}
    fin: Finalize "Form Union"

Physics
  tds1: DilutedSpecies "Transport of Diluted Species" on all domains
    dependent variable c1 = {c1, c2}
    TransportMechanism.Convection = 0
    TransportMechanism.MassTransferInPorousMedia = 1
    cdm1: ConvectionDiffusionMigration "Transport Properties 1" (default) | D_c2 = diffusionConst; D_c = diffusionConst
    nflx1: NoFlux (default)
    init1: init "Initial Values 1" (default) | initc = {0, 0}
    conc1: Concentration on boundaries 2 | species = {1, 1}; c0 = {cAL, cBL}
    reac1: Reactions on domains 1 | R_c1 = -kA*c1; R_c2 = kA*c1-kB*c2

Mesh
  mesh1 "Mesh 1" (physics-controlled)
    size: MeshSizeDefault | hauto = 3

Studies
  std1 "Study 1"
    stat: Stationary

Solver configurations
  sol1 "Solution 1" (study std1)
    v1: Variables "Dependent Variables 1"
    s1: Stationary "Stationary Solver 1"
      fc1: FullyCoupled | linsolver = d1; initstep = 0.01; minstep = 1.0E-6; maxiter = 50
      d1: Direct "Direct, concentrations (tds1)" | linsolver = pardiso; pivotperturb = 1.0E-13

Datasets
  dset1: Solution | solution = sol1

Plots
  pg1: PlotGroup1D "Concentrations, All Species (tds)" | data = dset1; title = Concentrations, All Species
    lngr1: LineGraph "Species c1" on all domains | expr = c1; xdata = expr; xdataexpr = x; autosolution = off
    lngr2: LineGraph "Species c2" on all domains | expr = c2; xdata = expr; xdataexpr = x; autosolution = off
  pg2: PlotGroup1D "Concentration, c1 (tds)" | data = dset1; typeintitle = off; prefixintitle = Species c1:
    lngr1: LineGraph on all domains | expr = c1; xdata = expr; xdataexpr = x
  pg3: PlotGroup1D "Concentration, c2 (tds)" | data = dset1; typeintitle = off; prefixintitle = Species c2:
    lngr1: LineGraph on all domains | expr = c2; xdata = expr; xdataexpr = x
  pg4: PlotGroup1D "1D Plot Group 4" | data = dset1
    lngr1: LineGraph on all domains | expr = (kB*c2)/((kA*c1)-(kB*c2)); xdata = expr; xdataexpr = x

Exports
  data1: Data | data = dset1; expr = {c1, c2}; filename = C:\Users\1034898\AppData\Local\Temp\3\CitrixClient\240e-6.txt